// COMSOL Multiphysics 6.3.0.290 model "tps_tile_Model.mph"
// Outline of the model tree

Parameters
  Lt = 0.08[m]
  Tamb = 210[K]
  eps_s = 0.85

Functions
  int1: Interpolation "插值 1"
    funcnametable = {qfun, 1}
    source = file
    filename = E:\Claude\mars\comsol\qdot_entry.txt
    filecolumns = 2
    columnKeys = {col1, col2}
    columnType = {col1, arg, col2, value}
    funcnames = {col1, int1, col2, qfun}
    fununit = W/m^2
    argunit = s

Geometry
  geom1 "几何 1" (1D, length unit m)
    i1: Interval "线段间隔 1" | coord = {0, Lt}; p1 = 0; p2 = Lt
    i2: Interval "线段间隔 2" | coord = {Lt, Lt+0.004}; p1 = Lt; p2 = Lt+0.004
    fin: Finalize "形成联合体"

Physics
  ht: HeatTransfer "固体传热" on all domains
    dependent variable T
    solid1: SolidHeatTransferModel "固体 1" (default)
      k_mat = userdef
      k = 0.12[W/(m*K)]
      rho_mat = userdef
      rho = 350[kg/m^3]
      Cp_mat = userdef
      Cp = 900[J/(kg*K)]
    init1: init "初始值 1" (default) | Tinit = Tamb
    ins1: ThermalInsulation "热绝缘 1" (default)
    solid2: SolidHeatTransferModel "固体 2" on domains 2
      k_mat = userdef
      k = 20[W/(m*K)]
      rho_mat = userdef
      rho = 7900[kg/m^3]
      Cp_mat = userdef
      Cp = 550[J/(kg*K)]
    hf1: HeatFluxBoundary "热通量 1" on boundaries 1 | q0_input = qfun(t) - eps_s*5.670374419e-8[W/(m^2*K^4)]*(T^4 - Tamb^4)

Mesh
  mesh1 "网格 1"
    size: MeshSizeDefault "大小" | hmax = 0.00563; hmin = 2.52E-5; hcurve = 0.3; hgrad = 1.3
    e1: Edge "边 1" on remaining entities
      size1: Size "大小 1" on entire geometry | hmax = 0.5[mm]

Studies
  std1 "研究 1"
    time: Transient "瞬态" | tlist = range(0,10,3000)

Solver configurations
  sol1 "解 1" (study std1)
    v1: Variables "因变量 1"
    t1: Time "瞬态求解器 1"
      fc1: FullyCoupled "全耦合 1"
      d1: Direct "直接，传热变量 (ht)"

Datasets
  dset1: Solution | solution = sol1